units			si
atom_style		sphere
atom_modify		map array
atom_modify 	sort 0 0.003

dimension       3

comm_modify	    cutoff 0.015 vel yes

boundary		f f f
newton			off

timestep        1e-6

processors      7 2 2 map cart
region			box block 0.0 1.0 -0.15 0.15 -0.15 0.15 units box
create_box		2 box

lattice         hcp 0.02
region          subbox block 0.00825 0.45 -0.15 0.15 -0.15 0.15 units box

create_atoms 	1 region subbox
set 			type 1 diameter 0.0125 density 1000

group           g1 type 1

neighbor		0.001 bin
neigh_modify	delay 0 every 1 check yes

pair_style      gran/hooke/history 10000.0 NULL 100.0 NULL 0.5 1 limit_damping
pair_coeff      * *

fix             wallxn all wall/gran hooke 10000.0 NULL 100.0 NULL 0.5 0 xplane 0.0 1.0
fix             wallyn all wall/gran hooke 10000.0 NULL 100.0 NULL 0.5 0 yplane -0.15 0.15
fix             wallzn all wall/gran hooke 10000.0 NULL 100.0 NULL 0.5 0 zplane -0.15 0.15

variable        gravForce1 equal -(1000.0)*4.0/3.0*PI*0.00625*0.00625*0.00625*9.81
fix             gravity g1 addforce v_gravForce1 0.0 0.0

fix             integrate all nve/sphere

dump           	iddumpxyz all xyz 5000 xyzoutput.xyz

compute			1 all erotate/sphere
thermo_style	custom step atoms ke
thermo			1000
thermo_modify	lost ignore norm no flush yes
compute_modify	thermo_temp dynamic yes

compute         compTemp all temp
compute         pressureFix all pressure NULL virial

run             10000000

write_restart   particleSetup.start
