units			si
atom_style		sphere
atom_modify		map array
atom_modify 	sort 0 0.003

comm_modify	    cutoff 0.001 vel yes

boundary		p p p
newton			off

processors      2 2 2 map cart
region			box block 0. 0.005 0. 0.005 0. 0.005 units box
create_box		2 box

create_atoms 	1 single 0.0015 0.0025 0.0025
create_atoms 	2 single 0.0035 0.0025 0.0025
group           g1 type 1
group           g2 type 2
set 			type 1 diameter 0.0005 density 1000
set 			type 2 diameter 0.0005 density 1000

neighbor		0.001 bin
neigh_modify	delay 0 every 1 check yes

pair_style		none

fix             lbDYN all lbm-psm every 1 Nlc 11 lc 0.0005 rho 1000.0 nu 0.0001 Re 0.1 tau 0.7
fix             lbVTK all lbm-psm-vtk every 10000

variable        Re equal 0.1
variable        nu equal 0.0001
variable        lc equal 0.0005
variable        Uc equal ${Re}*${nu}/${lc}
fix mID1        g1 move linear ${Uc} 0.0 0.0
fix mID2        g2 move linear -${Uc} 0.0 0.0

dump           	iddump all custom 100 s.p id type diameter mass x y z vx vy vz fx fy fz tqx tqy tqz omegax omegay omegaz

compute			1 all erotate/sphere
thermo_style	custom step atoms ke
thermo			1
thermo_modify	lost ignore norm no flush yes
compute_modify	thermo_temp dynamic yes

run 100000
